// SBML level 2 version 4

model Nutrient_transition_counter()

  // Compartments:
  compartment default = 1 volume;

  // Species:
  species Gal in default = 0;
  substanceOnly species Glu in default = 0;
  species Gal_Sensor in default = 0;
  species Degraded_Glu in default = 0;
  species Degraded_Gal in default = 0;
  species Glu_Sensor in default = 0;
  species Gal_Activator in default = 0;
  species Glu_to_Gal in default = 0; Glu_to_Gal is "Glu-to-Gal";
  species Glu_Activator in default = 0;
  species Gal_to_Glu in default = 0; Gal_to_Glu is "Gal-to-Glu";
  species Degraded_Glu_Sensor in default = 0;
  species Degraded_Gal_Sensor in default = 0;
  species Degraded_Glu_To_Gal in default = 0;
  species Degraded_Gal_To_Glu in default = 0;

  // Reactions:
  re1: Glu => Degraded_Glu; Glu*glu_deg_k;
    glu_deg_k = 10 substance;
  re8: Gal => Degraded_Gal; Gal*gal_deg_k;
    gal_deg_k = 10 substance;
  re3: Glu_Sensor => Degraded_Glu_Sensor; Glu_Sensor*glu_sensor_deg_k;
    glu_sensor_deg_k = 1 substance;
  re12: Gal => Glu_Sensor + Gal; Gal*re12_k1;
    re12_k1 = 1 substance;
  re2: Gal_Sensor => Degraded_Gal_Sensor; Gal_Sensor*gal_sensor_deg_k;
    gal_sensor_deg_k = 1 substance;
  re6: Gal_Sensor + Gal => Gal_Activator; Gal_Sensor*Gal*gal_act_kf - gal_act_kr*Gal_Activator;
    gal_act_kf = 1 substance; gal_act_kr = 1 substance;
  re4: Glu => Gal_Sensor + Glu; Glu*re4_k1;
    re4_k1 = 1 substance;
  re5: Gal_Activator => Glu_to_Gal + Gal_Activator; Gal_Activator*k2;
    glu_to_gal_k = 1 substance; k2 = 1 substance;
  re7: Glu_to_Gal => Degraded_Glu_To_Gal; Glu_to_Gal*glu_to_gal_deg_k;
    glu_to_gal_deg_k = 0.001 substance;
  re11: Gal_to_Glu => Degraded_Gal_To_Glu; Gal_to_Glu*gal_to_glu_deg_k;
    gal_to_glu_deg_k = 0.001 substance;
  re9: Glu_Activator => Gal_to_Glu + Glu_Activator; Glu_Activator*re9_k1;
    gal_to_glu_k = 1 substance; re9_k1 = 1 substance;
  re10: Glu_Sensor + Glu => Glu_Activator; Glu_Sensor*Glu*glu_act_kf - glu_act_kr*Glu_Activator;
    glu_act_kf = 1 substance; glu_act_kr = 1 substance;

  // Unit definitions:
  unit substance = mole;
  unit volume = litre;
  unit area = metre^2;
  unit length = metre;
  unit time = second;
end
